# Materials Studio Generated CAR File
# Three independent simulations using the same TbHz.data file

# runid and seed are advanced together at the end of each simulation
variable          runid index 2 3
variable          seed  index 8374921 57382917

label             loop_three_seeds

# Reset the complete simulation state before reading the same data file again.
# Index-style variables survive the clear command.
clear

# Write each independent run to a separate LAMMPS log file.
log               log.TbHz.run${runid}.seed${seed}

print             "============================================================"
print             "Starting independent run ${runid} with random seed ${seed}"
print             "All runs read the same data file: TbHz.data"
print             "============================================================"

units             real
atom_style        full
boundary          p p p

pair_style        lj/cut/coul/long 10.0 12.0
pair_modify       mix arithmetic
bond_style        harmonic
angle_style       harmonic
dihedral_style    charmm
improper_style    harmonic
kspace_style      pppm 1.0e-4

# This command is executed once in every loop iteration.
read_data         TbHz.data

region            lt block EDGE EDGE EDGE EDGE EDGE 39.803101
region            rt block EDGE EDGE EDGE EDGE 53.043098 EDGE
region            memb block EDGE EDGE EDGE EDGE 39.803101 53.043098
region            pump block EDGE EDGE EDGE EDGE 10 20
region            tot block EDGE EDGE EDGE EDGE EDGE EDGE

group             cof type 1 2 3
group             water type 4 5
group             ow type 4
group             hw type 5
group             li type 6
group             cl type 7
group             mg type 8
group             liquid type 4 5 6 7 8
group             freeze type 1 2 3

neighbor          2.0 bin

compute           watertemp water temp/region memb
compute           all_temp liquid temp/com
compute           cof_temp cof temp/com

variable          mw equal count(ow,memb)
variable          mli equal count(li,memb)
variable          mcl equal count(cl,memb)
variable          mmg equal count(mg,memb)

variable          fw equal 100*0.108091375/(count(ow,pump)+6.941/16*count(li,pump)+35.4527/16*count(cl,pump)+24.305/16*count(mg,pump))
variable          fli equal 6.941/16*v_fw
variable          fcl equal 35.4527/16*v_fw
variable          fmg equal 24.305/16*v_fw

# Use run-specific names so the three calculations do not overwrite one another.
restart           1000 restart.run${runid}.seed${seed}.1 restart.run${runid}.seed${seed}.2

timestep          1.0

# ---------------------------- Minimization ----------------------------

thermo            10
thermo_style      custom step cpu etotal
thermo_modify     flush yes
#fix              freeze_min freeze setforce 0.0 0.0 0.0
minimize          1.0e-5 1.0e-5 1000 1000

# ---------------------------- Equilibrium -----------------------------

#unfix            freeze_min

# Capture the post-minimization center of mass as a numeric reference.
variable          z0 equal xcm(cof,z)
print             "Run ${runid}: initial COF center-of-mass z0 = ${z0} Angstrom"
fix               cof_hold cof spring tether 20.0 NULL NULL ${z0} 0.0

variable          zcof equal xcm(cof,z)
variable          dzcof equal v_zcof-${z0}

# The seed changes between runs; all other initial settings are identical.
velocity          liquid create 300.0 ${seed} mom yes rot yes dist gaussian
velocity          cof create 300.0 ${seed} mom yes rot yes dist gaussian

thermo            1000
thermo_style      custom step cpu c_watertemp c_all_temp c_cof_temp v_zcof v_dzcof
thermo_modify     flush yes

dump              1 all custom 10000 equilibrium.run${runid}.seed${seed}.lammpstrj id type x y z
dump_modify       1 sort id

fix               1 water shake 1e-5 2000 0 b 5 a 8
fix               2 ow addforce 0.0 0.0 v_fw region pump
fix               4 li addforce 0.0 0.0 v_fli region pump
fix               5 cl addforce 0.0 0.0 v_fcl region pump
fix               6 mg addforce 0.0 0.0 v_fmg region pump
fix               7 liquid nve
fix               8 liquid temp/berendsen 300.0 300.0 100.0
fix_modify        8 temp all_temp

fix               9 cof nvt temp 300.0 300.0 100.0
fix_modify        9 temp cof_temp

run               120000000

print             "Completed independent run ${runid} with random seed ${seed}"

# Advance both index variables.  When their third values are exhausted,
# LAMMPS skips the following jump and exits the input script.
next              runid seed
jump              SELF loop_three_seeds
